# Initialize simulation
units           real
atom_style      charge

# Read the restart file from the NPT simulation
read_restart    restart.NPT

# Apply the ReaxFF potential
pair_style      reax 10.0 0 1 1.0e-6
pair_coeff      * * ffield.reax 4 3

# Neighbor settings
neighbor        2 bin
neigh_modify    every 10 delay 0 check no

# Set up NVT ensemble
fix             1 all nvt temp 300.0 300.0 100.0   # Nose-Hoover thermostat for NVT

# Output settings
timestep        1.0
thermo          100
thermo_style    custom step temp press pe ke etotal

dump            2 all custom 1000 dump_nvt.lammpstrj id type x y z vx vy vz q

# Run the NVT simulation
run             500000

write_restart   restart.NVT
